# Example Building  Geometry
# The 30 story residential building is located in Vancouver BC, on soil site class C. There are five stories below grade and a mechanical penthouse on the top of the building.
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# Slab thicknesses
t_slab1 := 190 mm = 0.19 m
t_slab2 := 250 mm
# Story heights:
H_PHcl := 4880 mm
H_PH := H_PHcl + t_slab1 = 5.07 m
H_Typcl := 2590 mm
H_Typ := H_Typcl + t_slab1 = 2.78 m
H_1cl := 4270 mm
H_1 := H_1cl + t_slab1 = 4.46 m
H_P1cl := 4270 mm
H_P1 := H_P1cl + t_slab2 = 4.52 m
H_P2toP5cl := 2750 mm
H_P2toP5 := H_P2toP5cl + t_slab2 = 3 m
# Total height above grade:
H_n := H_PH + 29*H_Typ + H_1 = 90.15 m
b := 26 m
# Total height including basement:
H_T := H_PH + 29*H_Typ + H_1 + H_P1 + 4*H_P2toP5 = 106.67 m
# Column Dimensions:
Col_b := 1250 mm
Col_d := 250 mm
# Concrete strengths:
fpc_P5to10 := 45 MPa
fpc_11to20 := 35 MPa
fpc_21toPH := 30 MPa
# Coupling beam depths:
# Lengths
L_cb1 := 1320 mm
# and
L_cb2 := 1120 mm  # CB1: Lobby, CB2: Stairs
# Stair opening:
h_stairs := 2085 mm
d_1st := H_1cl - h_stairs + t_slab1 = 2.375 m
d_2toPH := H_Typcl - h_stairs + t_slab1 = 0.695 m
d_PHst := H_PHcl - h_stairs + t_slab1 = 2.985 m
d_P1st := H_P1cl - h_stairs + t_slab2 = 2.435 m
d_P2toP5st := H_P2toP5cl - h_stairs + t_slab2 = 0.915 m
# Elevator lobby:
h_lobby := 2185 mm
d_1lob := H_1cl - h_lobby + t_slab1 = 2.275 m
d_2toPHlob := H_Typcl - h_lobby + t_slab1 = 0.595 m
d_PHlob := H_PHcl - h_lobby + t_slab1 = 2.885 m
d_P1lob := H_P1cl - h_lobby + t_slab2 = 2.335 m
d_P2toP5lob := H_P2toP5cl - h_lobby + t_slab2 = 0.815 m
# Wall dimensions:
# All Walls:
# Length of wall:
L_w := 8940 mm
# Thickness of flange:
tf := 710 mm
# Wall 1:
# Length of flange:
b_w1 := 1015 mm
# Thickness of web:
tw_1 := 405 mm
# Wall 2:
# Length of flange:
b_w2 := 2590 mm
# Thickness of web:
tw_2 := 305 mm
# Wall 3:
# Length of flange:
b_w3 := 1675 mm
# Thickness of web:
tw_3 := 355 mm
# Live Load Reduction_____________________________________________________
# Live load reduction factor, allows a reduction on live loads for components with lots of tributary area:
LL_red(B) := 0.3 + sqrt(9.8/(B/m^2))  # disabled  # NBCC 4.1.5.8
# Live load reduction on walls:
# Approximate trib area
# Wall:
Trib_W1 := ((b - L_w)/2 + L_w)*((b - 7720 mm)/2 + 7720 mm) = 294.544 m^2
# * Ignored for now
# Seismic Hazard (Design Spectrum)
# The design spectrum represents the seismic hazard based on the buildings soil condition and location (location to faults etc.). This building is assumed ot be located in downtown Vancouver BC, site class C.
S_a0.1 := 0.686
S_a0.2 := 0.848
S_a0.3 := 0.852
S_a0.5 := 0.751
S_pga := 0.369
S_a1.0 := 0.425
S_a2.0 := 0.257
S_a5.0 := 0.0804
S_a10.0 := 0.0285
S_pgv := 0.553
# According to the NBCC, the response spectrum values are adjusted to account for site class conditions, for site class C use the following conditions:
F_0.2 := 1.0
F_0.5 := 1.0
F_1.0 := 1.0
F_2.0 := 1.0
F_5.0 := 1.0
F_10.0 := 1.0
F_a := F_0.2
F_v := F_1.0
# Importance Factor for a Normal importance category:
I_E := 1.0
# Using the equations from NBCC 4.1.8.4 the values are adjusted:
T_g := [0; 0.2; 0.5; 1; 2; 5; 10]*s
S_g := [
    max(F_0.2*S_a0.2, F_0.5*S_a0.5);
    max(F_0.2*S_a0.2, F_0.5*S_a0.5);
    F_0.5*S_a0.5;
    F_1.0*S_a1.0;
    F_2.0*S_a2.0;
    F_5.0*S_a5.0;
    F_10.0*S_a10.0
] = [0.848; 0.848; 0.751; 0.425; 0.257; 0.0804; 0.0285]
S_0.2 := S_g[1]
S_0.5 := S_g[2]
S_1.0 := S_g[3]
S_2.0 := S_g[4]
S_5.0 := S_g[5]
S_10.0 := S_g[6]
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# 4.1.8.7 Methods of Analysis
# According to NBCC 4.1.8.7 buildings with a height greater than 60m or a fundmental period greater than 2s require dynamic anlysis. Therefore, a elastic cracked model was buult in ETABS.
# ETABS MODEL
# Model was created in etabs. Podium floor uses a semi-rigid diaphragm constraint. The grade and below grade slabs are 250mm thick, elastic membranes with a semi-rigid diaphragm constraint. The above grade slabs are 190mm with a rigid diaphragm constraint. Column elements are assumed to not contributed to the lateral stiffness and therefore have moment relesases at every story.
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# Cracking properties:
# For diagonally reinforced coupling beams:
I_crCB := 0.25*I_CB  # disabled
A_crCB := 0.45*A_CB  # disabled
# For walls, the area is cracked the same as the moment of inertia, therefore adjust the modulus of elasticity
I_crWall := α_w*I_wall  # disabled
A_crWall := α_w*A_wall  # disabled
# Where:
α_w := min(max*(1 - 0.35*(R_d*R_o/γ_w - 1), 0.5), 1)  # disabled
# Where γw is the overstrength and can be taken
# as Ro
# For East-West Direction Overstrength and ductility are (Assuming DOC > 0.66 - > check this):
R_dx := 4
# and
R_ox := 1.7
# Cracked value is:
α_wx := min(max(1 - 0.35*(R_dx - 1), 0.5), 1) = 0.5
# For North-South Direction Overstrength and ductility are:
R_dy := 3.5
# and
R_oy := 1.6
# Cracked value is:
α_wy := min(max(1 - 0.35*(R_dy - 1), 0.5), 1) = 0.5
# Natural frequencies:
# Modal analysis showed:
T_ETABSx := 5.864 s
T_ETABSy := 4.567 s
# The NBCC gives an emperical formula to estimate the period of the structure. NBCC period is estimated as:
# NBCC emperical formula for period:
T_a := 0.05 s*(H_n/m)^(3/4) = 1.46283 s  # 4.1.8.11 3) c
# where Hn was taken as
H_n = 90.15 m  # which does not include the basement levels
# . If the dynamic period is > than 2xNBCC use the NBCC estimate (4.1.8.11 3.d.iii):
T_x := min(T_ETABSx, 2*T_a) = 2.92566 s
T_y := min(T_ETABSy, 2*T_a) = 2.92566 s
# Using response spectrum analysis in Etabs, gives the following base shears:
V_etabsx := 17560 kN
V_etabsy := 23830 kN
# NBCC 2015 Base Shear
# Seismic weight:
W_seismic := 15506263 kg*g = 152064 kN
# Spectral acceleration
S_Tax := linterp(T_g, S_g, T_x) = 0.202509
S_Tay := linterp(T_g, S_g, T_y) = 0.202509
# Factors from the NBCC
# Table 4.1.8.11: Higher mode factors
S_0.2/S_5.0 = 10.5473
# X Direction:
T_x = 2.92566 s
M_v2.0x := linterp([5; 20], [1; 1], S_0.2/S_5.0) = 1
M_v5.0x := linterp([5; 20], [1; 1.08], S_0.2/S_5.0) = 1.02959
# Interpolation should be done on the product S(Ta)Mv  --  See note (2) of Table 4.1.8.11
M_vx := linterp([2 s; 5 s], [S_2.0*M_v2.0x; S_5.0*M_v5.0x], T_x)/S_Tax = 1.00362
# Y Direction:
T_y = 2.92566 s
# Old formula, for reference
M_vx := linterp([2 s; 5 s], [M_v2.0x; M_v5.0x], T_x)  # disabled
M_v2.0y := linterp([5; 20], [1; 1.18], S_0.2/S_5.0) = 1.06657
M_v5.0y := linterp([5; 20], [1.25; 2.3], S_0.2/S_5.0) = 1.63831
M_vy := linterp([2 s; 5 s], [M_v2.0y; M_v5.0y], T_y)  # disabled
M_vy := linterp([2 s; 5 s], [S_2.0*M_v2.0y; S_5.0*M_v5.0y], T_y)/S_Tay = 1.13661
# Base shear from the NBCC
V_ax := S_Tax*M_vx*I_E*W_seismic/(R_ox*R_dx) = 4545.01 kN
V_ay := S_Tay*M_vy*I_E*W_seismic/(R_oy*R_dy) = 6250.21 kN
V_maxx := M_vx*I_E*W_seismic/(R_ox*R_dx)*max(2/3*S_0.2, S_0.5)
V_maxy := M_vy*I_E*W_seismic/(R_oy*R_dy)*max(2/3*S_0.2, S_0.5)
S_4.0 := linterp(T_g, S_g, 4 s) = 0.139267
V_minx := M_vx*S_4.0*I_E*W_seismic/(R_ox*R_dx) = 3125.63 kN
V_miny := M_vy*S_4.0*I_E*W_seismic/(R_oy*R_dy) = 4298.3 kN
V_x := min(max(V_ax, V_minx), V_maxx) = 4545.01 kN
V_y := min(max(V_ay, V_miny), V_maxy) = 6250.21 kN
# Determine Scaling factor
Fact_Vex := min(1, max(2/3*S_0.2, S_0.5)*1/linterp(T_g, S_g, T_x)) = 1
Fact_Vey := min(1, max(2/3*S_0.2, S_0.5)*1/linterp(T_g, S_g, T_x)) = 1
V_dx := max(Fact_Vex*V_etabsx*I_E/(R_ox*R_dx), 0.8*V_x) = 3636.01 kN
V_dy := max(Fact_Vey*V_etabsy*I_E/(R_oy*R_dy), 0.8*V_y) = 5000.17 kN
# Scaling factor:
SF_x := V_dx/V_etabsx = 0.207062
SF_y := V_dy/V_etabsy = 0.209827
# Check torsion sensitivity
# NBCC 4.1.8.11 - 10) "The torsional sensativity shall be determined by calculating the ratio Bx for each level x according to the following equation for orthofonal direction determined independantly:
B_x := δ_max/δ_avg  # disabled
# Where:
# B = maximum of all values of Bx in both orthogonal directions, except the Bx for one-storey penthouses with a weight less than 10% of the level below need not be considered.
# δ._max =maximum storey displacement at the extreme points of the structure at level x in the direction of the earthquake induced by equivelant static forces acting at distances +-0.1Dnx from the centres of mass at eacg floor, and
# δ._avg =average of displacements at the extreme points of the structure at level x produced by the above mentioned forces"
# In order to calculate B, we need the equivelant static forces. Forces are distributed as:
F_x := (V - F_t)*W_x*h_x/sum(F_i*(h_i - h_x), i = x .. n)  # disabled
# Where Ft is calculated:
V_ex := V_x*R_ox*R_dx = 30906.1 kN
F_tx := min(0.25*V_ex, 0.07*T_x*V_ex/s) = 6329.45 kN
V_ey := V_y*R_oy*R_dy = 35001.2 kN
F_ty := min(0.25*V_ey, 0.07*T_y*V_ey/s) = 7168.12 kN
# For this analysis, the penthouse mass was lumped at the top floor and Ft was applied at the top floor (not the PH)..
# The torsion applied at every floor was taken as:
T_x := 0.1*D_nx*F_x  # disabled
# Where D_nx = 26m and F_x = Equavelant static force applied at story x
# The dynamic lateral load case is added to the static torsion load case.
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# Coupled direction (X-direction)
# Max Bx = 1.22
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# Uncoupled direction (Y-direction)
# Max By = 1.28
# B is less than 1.7, therefore this building is not torsionally sensative.
# Degree of Coupling
# Fully coupled wall system requires the degree of coupling (DOC) is greater than 0.66:
DoC := T*d_w/(M_1 + M_2 + T*d_w)  # disabled
# Distance from individual wall pier centroids to overall core centroid:
# Wall 1:
x_cW1 := 3.724 m
# Wall 2:
x_cW2 := 44.4 mm
# Wall 3:
x_cW3 := 3.2076 m
# From RSA the max forces at ground level are:
# Max Moment in W1:
M_1 := 1609 kN*m
# Max Axial in W1:
P_1 := 13670 kN
# Max Moment in W2:
M_2 := 7972 kN*m
# Max Axial in W2:
P_2 := 39.78 kN
# Max Moment in W3:
M_3 := 4423 kN*m
# Max Axial in W3:
P_3 := 14630 kN
# Degree of coupling :
DoC := (x_cW1*P_1 + x_cW2*P_2 + x_cW3*P_3)/(M_1 + M_2 + M_3 + (x_cW1*P_1 + x_cW2*P_2 + x_cW3*P_3)) = 0.874785
# Degree of coupling is 87.5% which is greater than 66%, therefore the assumptions of Rd = 4 and Ro =1.7 is OK
# Wind Analysis NBCC 4.1.7_____________________________________________________
# A 3-D model was built in Etabs for Wind analysis. The cracked values used are as follows:
# Coupling Beams:
I_cr := 0.2*I_g  # disabled
# and
A_cr := 0.2*A_g  # disabled
# Shear Walls:
I_cr := 0.75*I_g  # disabled
# and
A_cr := 0.75*A_g  # disabled
# Period from Etabs model:
T_Wx := 4.84 s
# and
T_Wy := 3.797 s
# Wind demands were determined by using the dynamic procedure outlined by the NBCC
# Check to see if dynamic procedure is required.
H_n = 90.15 m  # >  # 60m  # Dynamic procedure required
H_n/b = 3.46731  # <  # 4  # Dynamic procedure not required
f_n := 1/T_Wx = 0.206612 1/s  # <  # 1 Hz  # Dynamic procedure required
# Technically an experimental method is required because:
f_n = 0.206612 1/s
# is less than
1/(4 s) = 0.25 1/s
# We will procede with the dynamic method as an estimate of the results. Additionally, exposure C has been removed from the NBCC 2010, but we will use it as it gives resonable wind demands for this type of structure.
# There are six different load cases to get the wind demands on the structure.
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# Need to know Pw and PL
EL := [
    90.15; 85.08; 82.3; 79.52; 76.74; 73.96; 71.18; 68.4; 65.62; 62.84
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]*m
# Importance factor, windload Table 4.1.7.1.
I_w := 1
SLS := 0.75
# Velocity pressure sentence (4):
q_50 := 0.45 kPa  # (1 in 50 years hourly wind pressure)
# Exposure factor, Ce (Par. 7,41-44):
# Windward:
C_eWW :=
    for i ∈ 0 .. 30
        C_e[i] ← min(max(0.4*(EL[i]/(30 m))^0.5, .4), 2.5)
    C_e
Leeward
C_eLW := min(max(0.4*(H_n/2/(30 m))^0.5, .4), 2.5) = 0.490306
# Sentence (6) Internal gust effect, Cg (Par. 45-56):
# The gust effect factor, Cg, is obtained by:
C_g := 1 + g_p*σ_μ  # disabled
# The coefficient of variation, σ_μ, is determined by:
σ_μ := sqrt(K_r/C_eH*(B + s*F/β))  # disabled
# Exposure factor at the top of the building evaluated according to Paragraph 43:
# Exposure B:
C_eHB := min(max(0.5*(H_n/(12.7 m))^0.5, 0.5), 2.5) = 1.33214  # <= Not used
# Exposure C:
C_eH := min(max(0.4*(H_n/(30 m))^0.5, 0.4), 2.5) = 0.693397  # No longer in the NBCC 2010 but are using for estimating the wind demand
# Surface factor, K, roughness coefficient of terrain, for rough exposure:
# Exposure B:
K_r := 0.1  # disabled
# Exposure C:
K_r := 0.14
# Background turbulance factor, Figure I -19:
B_x := (4/3*integral((1/(1 + x*H_n/m/457))*(1/(1 + x*b/m/122))*x/(1 + x^2)^(4/3), x = 0 .. 914 m/H_n)) = 0.80807
B_y := B_x = 0.80807
# Mean wind speed, Par 49:
V_H := 39.2*sqrt(I_w*q_50/kPa)*sqrt(C_eH)*m/s = 21.8969 m/s
# Size reduction factor, Figure I-19:
s_x := π/3*(1/(1 + 8*H_n/(3*V_H*T_Wx)))*(1/(1 + 10*b/(V_H*T_Wx))) = 0.092784
s_y := π/3*(1/(1 + 8*H_n/(3*V_H*T_Wy)))*(1/(1 + 10*b/(V_H*T_Wy))) = 0.0652034
# Gust energy ratio of wave number, I-20:
x_0x := 1220 m/(T_Wx*V_H) = 11.5115
F_x := x_0x^2/(1 + x_0x^2)^(4/3) = 0.19419
x_0y := 1220 m/(T_Wy*V_H) = 14.6736
F_y := x_0y^2/(1 + x_0y^2)^(4/3) = 0.165816
# Damping factor, β:
β := 0.015
# The coefficient of variation, σ_μ, is determined by, Par 49:
σ_μ_x := sqrt(K_r/C_eH*(B_x + s_x*F_x/β)) = 0.636927
σ_μ_y := sqrt(K_r/C_eH*(B_y + s_y*F_y/β)) = 0.555592
# Peak factor as a function of average fluctuation rate, Figure I-21:
ν_x := 1/T_x*sqrt(s_x*F_x/(s_x*F_x + β*B_x)) = 0.264279 1/s
ν_y := 1/T_Wy*sqrt(s_y*F_y/(s_y*F_y + β*B_y)) = 0.180834 1/s
g_px := sqrt(2*ln(ν_x*3600*s)) + 0.577/sqrt(2*ln(ν_x*3600*s)) = 3.85929
g_py := sqrt(2*ln(ν_y*3600*s)) + 0.577/sqrt(2*ln(ν_y*3600*s)) = 3.75988
# The gust factors are then, Par 48:
C_gx := 1 + g_px*σ_μ_x = 3.45809
C_gy := 1 + g_py*σ_μ_y = 3.08896
# Local pressure coefficient, Cp (Par. 29):
# Windward pressure coefficient
C_pWindard :=
    C_Pw ← 0.6 if H_n/b < 0.25
    C_Pw ← 0.27*(H_n/b + 2) if 0.25 ≤ H_n/b < 1
    C_Pw ← 0.8 if 1 ≤ H_n/b
    C_Pw
    = 0.8
# Leeward pressure coefficient
C_pLeeward :=
    C_Pw ← -0.3 if H_n/b < 0.25
    C_Pw ← -0.27*(H_n/b + 0.88) if 0.25 ≤ H_n/b < 1
    C_Pw ← -0.5 if 1 ≤ H_n/b
    C_Pw
    = -0.5
# Tributary area:
TribH :=
    for ii ∈ 0 .. 30
        TH[ii] ← H_1*b/2 if ii < 1
        TH[ii] ← (H_1/2 + H_Typ/2)*b if 0 < ii < 2
        TH[ii] ← (H_PH*b/2 + H_Typ*b/2) if 28 < ii < 30
        TH[ii] ← H_PH/2*b if ii > 29
        TH[ii] ← H_Typ*b otherwise
    TH
# External pressure distribution
# Windward pressure:
pe_wwx := I_w*q_50*C_pWindard*C_gx*C_eWW
pe_wwy := I_w*q_50*C_pWindard*C_gy*C_eWW
# Leeward pressure:
pe_lwx := I_w*q_50*C_pLeeward*C_gx*C_eLW = -0.381492 kPa
pe_lwy := I_w*q_50*C_pLeeward*C_gy*C_eLW = -0.340771 kPa
# The following load cases are applied at centroid of diaphragm:
# Load Case: AX
AX_FX :=
    for ii ∈ 0 .. 30
        q[ii] ← TribH[ii]*pe_wwx[ii] - TribH[ii]*pe_lwx
    q
AX_FY := 0
AX_M := 0
# Load Case: AY
AY_FY :=
    for ii ∈ 0 .. 30
        q[ii] ← TribH[ii]*pe_wwy[ii] - TribH[ii]*pe_lwy
    q
AY_FX := 0
AY_M := 0
# Load Case: BX
BX_FX := AX_FX/2
BX_FY := 0
BX_M := BX_FX*b/4
# Load Case: BY
BY_FX := 0
BY_FY := AY_FY/2
BY_M := BY_FY*b/4
# Load Case: C
C_FX := 0.75*AX_FX
C_FY := 0.75*AY_FY
C_M := 0
# Load Case: D
D_FX := (0.75*AX_FX + 0.38*AX_FX)/2
D_FY := (0.75*AY_FY + 0.38*AY_FY)/2
D_M := (0.75*AX_FX - 0.38*AX_FX)*b/8 + (0.75*AY_FY - 0.38*AY_FY)*b/8
# *Note: Wind load cases were applied to a model which assumes the core wall takes all the demand.
# Design of Coupling Beams with Diagonal Reinforcement (Cl. 21.5.8.2)
# Summary of coupling beam design requirements:
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# Cl. 21.5.8.2.1 Dimensional limitations
# Coupling beams must meet the following requirements:
# beam depth, | d._cb | <= | 2 X clear span length | Not true for PH, L1, P1
# beam width, | t_cb | <= | wall thickness | OK!
# Beam shall be centered on the pier | OK!
# Wall piers at each end shall have sufficient length to contain embeddment, as specified in Cl. 21.5.8.2.5
# How to design the embedment of the top Coupling beams (no wall to extend to)?
# Coupling Beam Geometry
# Length of CB:
L_cb1 = 1.32 m
# and
L_cb2 = 1.12 m
# Assumptions fo the design of diagonal reinforcement:
# Angle approximated as::
α := atan((d_cb - 7.5 in)/L_cb)  # disabled
# Where d_cb and L_cb are the depth and clear span of the coupling beam, respectivly.
# The area of steel required is:
A_sReq := V_d/(2*sin(α)*f_y*ϕ_s)  # disabled
# Where:
V_d := Demand  # disabled
ϕ_s := 0.85
f_y := 400 MPa
# Coupling beams were designed based on the following assumptions:
# Smallest bar size considered: | 20M | Largest bar size considered: | 30M
# Highest quantity: 12 | Lowest quantity: 4
# Cl. 21.5.8.4.4 Inelastic rotational demand on coupling beams
# Inelastic rotational demand on coupling beams shall be taked as:
θ_id := Δ_f*R_o*R_d/h_w*l_cg/l_u < 0.04  # disabled
# where l_cg is the horizontal distance between the centroids of both walls
l_cg1 := 3.724 m + 44.4 mm = 3.7684 m
l_cg2 := 3.2076 m
# l_u is the clear span of the coupling beam:
l_u1 := 1.32 m
l_u2 := 1.112 m
# Δ_f is the displacement at top of the wall
Δ_f := 168 mm
# h_w is the height of the wall
h_w := 90.15 m
# Rotational demands:
θ_id1 := (Δ_f*R_dx*R_ox/h_w*l_cg1/l_u1) = 0.0361772  # <  0.04  # OK!
θ_id2 := (Δ_f*R_dx*R_ox/h_w*l_cg2/l_u2) = 0.0365534  # <  0.04  # OK!
# Cl. 21.5.8.3.4 Axial Forces in wall piers
# Axial force in the wall piers are increased by the ratio of the sum of coupling beam capacities to demands from the roof to the level under consideration (the system overstrength). This factor is conservatively determined using the demands without accidental torsion. For Rd = 4.0 or 3.5 the nominal shear resistance of the coupling beams can be used.
# Nominal shear resistance is defined in A23.3-14 as the factored resistance divided by the material factors:
V_n := V_rd/ϕ_s  # disabled
# For capacity design, overstrength factor γbx is determined:
# Wall 1: | Wall 2
γ_bx1 :=
    for i ∈ 0 .. 29
        γ[i] ← sum(V_n1[a], a = i .. 29)/sum(V_f1[a], a = i .. 29)
    γ  # disabled
γ_bx2 :=
    for i ∈ 0 .. 29
        γ[i] ← sum(abs(V_n1[a] - V_n2[a]), a = i .. 29)/sum(abs(V_f1[a] - V_f2[a]), a = i .. 29)
    γ  # disabled
# Wall 3:
γ_bx3 :=
    for i ∈ 0 .. 29
        γ[i] ← sum(V_n3[a], a = i .. 29)/sum(V_f3[a], a = i .. 29)
    γ  # disabled
# Where Vf is the factored forces in the coupling beams from RSA analysis excluding accidental torsion.
# Plastic Hinge Flexural Design
# Coupled direction:
R_dx = 4
# and
R_ox = 1.7
# Uncoupled direction:
R_dy = 3.5
# and
R_oy = 1.6
# Wall Geometry
# Length of wall:
L_w = 8.94 m
# Thickness flange:
tf = 0.71 m
# Thickness of web:
tw_1 = 0.405 m
tw_2 = 0.305 m
tw_3 = 0.355 m
# Flange length:
b_w1 = 1.015 m
b_w2 = 2.59 m
b_w3 = 1.675 m
# Cl. 21.5.2.1.2 Height of plastic hinge
# Plastic hinge length, minimum height of plastic hinge regions.
# The length of the longest shear wall component:
l_w := max(L_w, L_cb1 + L_cb2 + b_w1 + b_w2 + b_w3) = 8.94 m
# The plastic hinge length is then:
lp := 0.5*l_w + 0.1*h_w = 13.485 m
# Therefore, the first five stories will be detailed for a plastic hinge.
# Design forces
# The plastic hinge needs to be designed for the following load cases:
# 1.0D + 0.5L + 1.0E | 1.0D + 1.0E | 1.25D + 0.5L + 1.4W | 0.9D + 1.4W
# The base of the wall piers have the following demands:
# Wall 1:
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# Dead Load:
P_D1 := -28 MN
# Live Load:
P_L1 := -8.26 MN
# Wind Load:
P_W1 := 21574 kN
M2_W1 := 3225 kN*m
M3_W1 := 39059 kN*m
# Earthquake Load:
P_E1 := 13671 kN
M2_E1 := 2827 kN*m
M3_E1 := 45673 kN*m
# Coupling beam overstrength:
γ_cb1 := 1.65
# Compression wall
P_w1[0] := P_D1 + 0.5*P_L1 - γ_cb1*P_E1
M_w1[0] := M2_E1*γ_cb1
P_w1[1] := P_D1 - γ_cb1*P_E1  # ,
M_w1[1] := M2_E1*γ_cb1
M_w1[2] := M2_W1
P_w1[2] := 1.25*P_D1 + 0.5*P_L1 - 1.4*P_W1
# Tension wall
P_w1[3] := P_D1 + γ_cb1*P_E1
M_w1[3] := -M2_E1*γ_cb1
P_w1[4] := 1.25*P_D1 + 1.4*P_W1
M_w1[4] := -M2_W1
# Uncoupled direction:
P_w1[5] := P_D1 + 0.5*P_L1
M_w1[5] := M3_E1
P_w1[6] := P_D1
M_w1[6] := M3_E1
P_w1[7] := 1.25*P_D1 + 0.5*P_L1
M_w1[7] := M3_W1
# Wall 2:
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# Dead Load:
P_D2 := -36.9 MN  # Live Load:
P_L2 := -10.69 MN
# Wind Load:
P_W2 := 170 kN
M2_W2 := 19542 kN*m
M3_W2 := 60939 kN*m
# Earthquake Load:
P_E2 := 1075 kN
M2_E2 := 13101 kN*m
M3_E2 := 63740 kN*m
# Coupling beam overstrength:
γ_cb2 := 1.65  # <=Took the max of os but have other thoughts on this
P_w2 := [
    P_D2 + 0.5*P_L2 - γ_cb2*P_E2;
    P_D2 - γ_cb2*P_E2;
    1.25*P_D2 + 0.5*P_L2 - 1.4*P_W2;
    P_D2 + γ_cb2*P_E2;
    1.25*P_D2 + 1.4*P_W2;
    P_D2 + 0.5*P_L2;
    P_D2;
    1.25*P_D2 + 0.5*P_L2
]
M_w2 := [M2_E2*γ_cb2; M2_E2*γ_cb2; M2_W2; -M2_E2*γ_cb2; -M2_W2; M3_E2; M3_E2; M3_W2]
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# Wall 3:
# Dead Load:
P_D3 := -30.1 MN  # Live Load:
P_L3 := -8.62 MN
# Wind Load:
P_W3 := 21619 kN
M2_W3 := 7704 kN*m
M3_W3 := 48051 kN*m
# Earthquake Load:
P_E3 := 14629 kN
M2_E3 := 6201 kN*m
M3_E3 := 54957 kN*m
# Coupling beam overstrength:
γ_cb3 := 1.53  # <=Took the max of os but have other thoughts on this
P_w3 := [
    P_D3 + 0.5*P_L3 - γ_cb3*P_E3;
    P_D3 - γ_cb3*P_E3;
    1.25*P_D3 + 0.5*P_L3 - 1.4*P_W3;
    P_D3 + γ_cb3*P_E3;
    1.25*P_D3 + 1.4*P_W3;
    P_D3 + 0.5*P_L3;
    P_D3;
    1.25*P_D3 + 0.5*P_L3
]
M_w3 := [M2_E3*γ_cb3; M2_E3*γ_cb3; M2_W3; -M2_E3*γ_cb3; -M2_W3; M3_E3; M3_E3; M3_W3]
# Design Demands
# Wall 1: | Wall 2:
P_w1 = [-54687.2; -50557.2; -69333.6; -5442.85; -4796.4; -32130; -28000; -39130] kN
M_w1 = [4664.55; 4664.55; 3225; -4664.55; -3225; 45673; 45673; 39059] kN*m
P_w2 = [-44018.8; -38673.8; -51708; -35126.2; -45887; -42245; -36900; -51470] kN
M_w2 = [21616.7; 21616.7; 19542; -21616.7; -19542; 63740; 63740; 60939] kN*m
# Wall 3:
P_w3 = [-56792.4; -52482.4; -72201.6; -7717.63; -7358.4; -34410; -30100; -41935] kN
M_w3 = [9487.53; 9487.53; 7704; -9487.53; -7704; 54957; 54957; 48051] kN*m
# * A negative moment means web in tension and flange in compression.
# Cl. 21.5.8.3 Design of Wall Piers
# Concentrated vertical reinforcement must have minimum reinforcement in zones as specified in 21.5.6.1
# 21.5.6.1 Minimum amount of concentrated reinforcement
# Rd => 3.5 | 0.0015*b_w*l_w | Plastic hinge region
# X dir:
Asminx1 := 0.0015*tf*b_w1 = 1080.98 mm^2
# Y dir:
Asminy1 := 0.0015*tw_1*L_w = 5431.05 mm^2
Asminx2 := 0.0015*tf*b_w2 = 2758.35 mm^2
Asminy2 := 0.0015*tw_2*L_w = 4090.05 mm^2
Asminx3 := 0.0015*tf*b_w3 = 1783.88 mm^2
Asminy3 := 0.0015*tw_3*L_w = 4760.55 mm^2
# Assuming that the flanges are the zones, the max reinforcing is:
Asmax1 := 0.06*tf*b_w1 = 43239 mm^2
Asmax1/(1000 mm^2) = 43.239
Asmax2 := 0.06*tf*b_w2 = 110334 mm^2
Asmax2/(1000 mm^2) = 110.334
Asmax3 := 0.06*tf*b_w3 = 71355 mm^2
Asmax3/(1000 mm^2) = 71.355
# Cl. 21.5.5 Distributed reinforcement
# 21.5.5.1 minimum amount
# Minimum horizontal and vertical reinforcement shall not be less than 0.0025 in each direction
(b_w1/(200 mm) + 1)*(200 mm^2*2/(b_w1*tf)) = 0.00337196
# >
0.0025
# Cl. 21.5.7 Ductility of walls
# 21.5.7.4 Compression strain depth in wall
# For uncoupled direction:
P_n := -20696.060 kN
P_ns := 16*200*mm^2*fy + 4*700*mm^2*fy + 4*1000*mm^2*fy
α_1 := max(0.85 - 0.0015*fpc/MPa, 0.67)
β_1 := max(0.97 - 0.0025*fpc/MPa, 0.67)
c_NS := max((-P_n + P_ns - α_1*ϕ_c*fpc*tf*(bw - tw/2))/(α_1*β_1*fpc*ϕ_c*tw), (-P_n + P_ns)/(α_1*ϕ_c*fpc*(bw - tw/2)))
# For Coupled direction:
# Check both compression and tension wall
P_sT := 2*sum(V_n[i], i = 0 .. 14)
P_nsT := 24*200*mm^2*fy + 8*1000*mm^2*fy
c_EWT := ((-P_n + P_nsT - P_sT)/(α_1*β_1*fpc*ϕ_c*(2*tf)))
# compared with 0.43m from CWDS
P_sC := -P_sT
P_nsC := 8*700*mm^2*fy
c_EWC := ((-P_n + P_nsC - P_sC)/(α_1*β_1*fpc*ϕ_c*(hw + tf)))
# 21.5.8.4.2 Inelastic rotational demand at base of wall piers
# For uncoupled direction:
wos_NS := 2.696
Δ_fNS := 0.04 m
θ_idNS := max((Δ_f*R_oy*R_dy - Δ_f*wos_NS)/(h_w - (hw + tf)/2), 0.004)
θ_icNS := min(0.0035*(hw + tf)/(2*c_NS) - 0.002, 0.025)
# For coupled direction:
wos_EW := 2.659
θ_idES := max(Δ_f*R_oEW*R_dEW/h_w, 0.004)
θ_icEW := min(0.0035*((bw + tw/2)*2 + o)/(2*max(c_EWC, c_EWT)) - 0.002, 0.025)
# Loads applied at centroid of diaphragm
# Load Case: AX
AX_FX = [
    72.1684; 114.835; 87.1894; 86.1738; 85.1404; 84.0881; 83.0158; 81.9224; 80.8065; 79.6667
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] kN
AX_FY := 0
AX_M := 0
# Load Case: AY
AY_FY = [
    64.4649; 102.577; 77.8825; 76.9753; 76.0522; 75.1122; 74.1544; 73.1777; 72.1809; 71.1628
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] kN
AY_FX := 0
AY_M := 0
# Load Case: BX
BX_FX = [
    36.0842; 57.4173; 43.5947; 43.0869; 42.5702; 42.044; 41.5079; 40.9612; 40.4032; 39.8333
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] kN
BX_FY := 0
BX_M = [
    234.547; 373.212; 283.365; 280.065; 276.706; 273.286; 269.801; 266.248; 262.621; 258.917
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] kN*m
# Load Case: BY
BY_FX := 0
BY_FY = [
    32.2324; 51.2883; 38.9412; 38.4877; 38.0261; 37.5561; 37.0772; 36.5888; 36.0904; 35.5814
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] kN
BY_M = [
    209.511; 333.374; 253.118; 250.17; 247.17; 244.115; 241.002; 237.827; 234.588; 231.279
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] kN*m
# Load Case: C
C_FX = [
    54.1263; 86.1259; 65.392; 64.6304; 63.8553; 63.0661; 62.2619; 61.4418; 60.6048; 59.75
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] kN
C_FY = [
    48.3486; 76.9325; 58.4118; 57.7315; 57.0392; 56.3342; 55.6158; 54.8833; 54.1357; 53.3721
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] kN
C_M := 0
# Load Case: D
D_FX = [
    40.7751; 64.8815; 49.262; 48.6882; 48.1043; 47.5098; 46.9039; 46.2861; 45.6557; 45.0117
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] kN
D_FY = [
    36.4226; 57.9558; 44.0036; 43.4911; 42.9695; 42.4384; 41.8972; 41.3454; 40.7822; 40.207
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] kN
D_M = [
    164.301; 261.437; 198.499; 196.187; 193.834; 191.438; 188.997; 186.508; 183.967; 181.372
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] kN*m
